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/batch
! ANSYS input file written by Workbench version 12.1  Internal
! File used for geometry attach: c:\Temp\WB_WATSRELIAS_980_2\unsaved_project_files\dp0\SYS\DM\SYS.agdb
/title,ParameterExample--Static Structural (A5)
/com,--- Data in consistent MKS units.
/units,MKS
/track,-1
/prep7
! Turn off shape checking because checks already performed inside WB mesher.
! See help system for more information.
SHPP,OFF,,NOWARN
etcon,set             ! allow ANSYS to choose best KEYOP's for 180x elements
/com,*********** Nodes for the whole assembly ***********
nblock,3
(1i8,3e20.9e3)
       1    1.612689548E-003    6.779897687E-003    1.900000000E-001
       2    1.612689548E-003    6.779897687E-003    1.800000000E-001
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-1
/com,*********** Elements for Body 1 "Solid" ***********
et,1,186
keyo,1,2,1          ! set full integration on SOLID186
eblock,19,solid
(19i8)
       1       1       1       1       0       0       0       0      20       0       1       1      20     210      58     380     379     376     377
     695     793     947     696    1933    1931    1929    1932     699     794    1563     948
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-1
/com,*********** Send User Defined Coordinate System(s) ***********
csys,0
/com,*********** Set Reference Temperature ***********
tref,22.
/com,*********** Send Materials ***********
MP,DENS,1,7850,	! kg m^-3
MP,ALPX,1,1.2e-05,	! C^-1
MP,C,1,434,	! J kg^-1 C^-1
MP,KXX,1,60.5,	! W m^-1 C^-1
MP,RSVX,1,1.7e-07,	! kg m^3 A^-2 s^-3
MP,EX,1,200000000000,	! Pa
MP,NUXY,1,0.3,
MP,MURX,1,10000,

!************************* Model Summary ********************
!Solid, Structural Steel, matid, 1
!************************* End Model Summary ********************
/com,*********** Fixed Supports ***********
CMBLOCK,FIXEDSU ,NODE,      90
(8i10)
       381       382       383       384       385       386       387       388
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cmsel,s,FIXEDSU
d,all,all
nsel,all
nsel,all
/com,*********** Define Force Using Surface Effect Elements ***********
local,12,0,0.,0.,0.,-0.,0.,0.
csys,0
et,2,154
eblock,10
(15i8)
     501       2       2       2      12     691     692     370     368    2549    1920    1914    1917
     502       2       2       2      12     690     691     368     371    2548    1917    1915    1921
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-1
esel,s,type,,2
keyop,2,2,1                ! Apply load in local coordinate system
keyop,2,7,1                ! Use original area so load is constant in large deformation
keyop,2,11,2               ! Use real and not project area
esel,all

*DIM,_loadvari26x,TABLE,2,1,1,TIME,
! Time values
_loadvari26x(1,0,1) = 0.
_loadvari26x(2,0,1) = 1.
! Load values
_loadvari26x(1,1,1) = 0.
_loadvari26x(2,1,1) = 4111.70423185725


*DIM,_loadvari26y,TABLE,2,1,1,TIME,
! Time values
_loadvari26y(1,0,1) = 0.
_loadvari26y(2,0,1) = 1.
! Load values
_loadvari26y(1,1,1) = 0.
_loadvari26y(2,1,1) = 0.


*DIM,_loadvari26z,TABLE,2,1,1,TIME,
! Time values
_loadvari26z(1,0,1) = 0.
_loadvari26z(2,0,1) = 1.
! Load values
_loadvari26z(1,1,1) = 0.
_loadvari26z(2,1,1) = 0.

fini
/com,****************************************************************************
/com,*************************    SOLUTION       ********************************
/com,****************************************************************************
/solu
antype,0                   ! static analysis
solc,on,on                 ! Turn on solution control with ability to use contact time prediction
eqsl,pcg,1e-8,,,,,,1
resc,,none                 ! Do not keep any restart files
cntr,print,1               ! print out contact info and also make no initial contact an error
nldiag,cont,iter           ! print out contact info each equilibrium iteration
/com,****************************************************
/com,******************* SOLVE FOR LS 1 ****************
esel,s,type,,2
nsle
sfe,all,1,pres,1,%_loadvari26x%
sfe,all,2,pres,1,%_loadvari26y%
sfe,all,3,pres,1,%_loadvari26z%
nsel,all
esel,all
nsub,1,1,1
time,1.
outres,erase
outres,all,none
outres,nsol,all
outres,rsol,all
outres,nload,all
outres,strs,all
outres,epel,all
outres,eppl,all
! *********** WB SOLVE COMMAND ***********
! check interactive state
*get,ANSINTER_,active,,int
*if,ANSINTER_,ne,0,then
/eof
*endif
solve
/com,****************************************************
/com,*************** FINISHED SOLVE FOR LS 1 *************
*set,_DS_PROGRESS          ! turn off progress updates to avoid virus scanning bug
*get,_PCGITER,active,,solu,cgiter
/post1
fini
